// SBML level 3 version 2

model combined_model_of__combined_model_of__external_reservoir_model_combined_model_of__complex_membrane_combined_model_of__biocrnpyler_60297()
  // model units - substance: mole, time: second, volume: litre, area: square_metre, length: metre, extent: mole

  // Compartments:
  compartment cell_2_external_combined = 2e-6 litre;
  compartment cell_2_internal_combined = 1e-6 litre;

  // Species:
  species rna_I4_external_reservoir_model_1_combined in cell_2_external_combined = 0;
  species transport_protein in cell_2_internal_combined = 100/cell_2_internal_combined;
  species rna_I4_transport_protein in cell_2_internal_combined = 0;
  species Sw1_OFF_biocrnpyler_60297 in cell_2_internal_combined = 2000/cell_2_internal_combined;
  species complex_Sw1_ON_biocrnpyler_60297 in cell_2_internal_combined = 0;
  species rna_I3_biocrnpyler_60297 in cell_2_internal_combined = 0;
  species dna_A1_biocrnpyler_60297 in cell_2_internal_combined = 0;
  species rna_I1_biocrnpyler_60297 in cell_2_internal_combined = 0;
  species protein_RNAP_biocrnpyler_60297 in cell_2_internal_combined = 500/cell_2_internal_combined;
  species protein_RNAseH_biocrnpyler_60297 in cell_2_internal_combined = 10/cell_2_internal_combined;
  species complex_Sw1_AI_biocrnpyler_60297 in cell_2_internal_combined = 0;
  species complex_Sw1_ON_protein_RNAP_biocrnpyler_60297 in cell_2_internal_combined = 0;
  species complex_Sw1_OFF_protein_RNAP_biocrnpyler_60297 in cell_2_internal_combined = 0;
  species complex_Sw1_AI_protein_RNAseH_biocrnpyler_60297 in cell_2_internal_combined = 0;
  species Sw2_OFF_biocrnpyler_60297 in cell_2_internal_combined = 2000/cell_2_internal_combined;
  species complex_Sw2_ON_biocrnpyler_60297 in cell_2_internal_combined = 0;
  species dna_A2_biocrnpyler_60297 in cell_2_internal_combined = 0;
  species rna_I2_biocrnpyler_60297 in cell_2_internal_combined = 0;
  species complex_Sw2_AI_biocrnpyler_60297 in cell_2_internal_combined = 0;
  species complex_Sw2_ON_protein_RNAP_biocrnpyler_60297 in cell_2_internal_combined = 0;
  species complex_Sw2_OFF_protein_RNAP_biocrnpyler_60297 in cell_2_internal_combined = 0;
  species complex_Sw2_AI_protein_RNAseH_biocrnpyler_60297 in cell_2_internal_combined = 0;
  species Sw3_OFF_biocrnpyler_60297 in cell_2_internal_combined = 2000/cell_2_internal_combined;
  species complex_Sw3_ON_biocrnpyler_60297 in cell_2_internal_combined = 0;
  species rna_I4_1_1_combined in cell_2_internal_combined = 0;
  species dna_A3_biocrnpyler_60297 in cell_2_internal_combined = 2000/cell_2_internal_combined;
  species complex_Sw3_AI_biocrnpyler_60297 in cell_2_internal_combined = 0;
  species complex_Sw3_ON_protein_RNAP_biocrnpyler_60297 in cell_2_internal_combined = 0;
  species complex_Sw3_OFF_protein_RNAP_biocrnpyler_60297 in cell_2_internal_combined = 0;
  species complex_Sw3_AI_protein_RNAseH_biocrnpyler_60297 in cell_2_internal_combined = 0;

  // Parameters:
  kb = 0.01 per_second;
  kd = 0.2 per_second;

  // Reactions:
  r1: rna_I4_external_reservoir_model_1_combined + transport_protein -> rna_I4_transport_protein; kb*rna_I4_external_reservoir_model_1_combined*transport_protein - kd*rna_I4_transport_protein;
  r2: rna_I4_transport_protein -> rna_I4_1_1_combined + transport_protein; kd*rna_I4_transport_protein - kb*rna_I4_1_1_combined*transport_protein;
  r0_biocrnpyler_60297: Sw1_OFF_biocrnpyler_60297 + dna_A1_biocrnpyler_60297 => complex_Sw1_ON_biocrnpyler_60297; r0_biocrnpyler_60297_k*Sw1_OFF_biocrnpyler_60297*dna_A1_biocrnpyler_60297;
    r0_biocrnpyler_60297_k = 0.00394;
  r1_biocrnpyler_60297: complex_Sw1_ON_biocrnpyler_60297 + rna_I1_biocrnpyler_60297 => Sw1_OFF_biocrnpyler_60297 + complex_Sw1_AI_biocrnpyler_60297; r1_biocrnpyler_60297_k*complex_Sw1_ON_biocrnpyler_60297*rna_I1_biocrnpyler_60297;
    r1_biocrnpyler_60297_k = 0.0696;
  r2_biocrnpyler_60297: dna_A1_biocrnpyler_60297 + rna_I1_biocrnpyler_60297 => complex_Sw1_AI_biocrnpyler_60297; r2_biocrnpyler_60297_k*dna_A1_biocrnpyler_60297*rna_I1_biocrnpyler_60297;
    r2_biocrnpyler_60297_k = 0.0696;
  r3_biocrnpyler_60297: complex_Sw1_ON_biocrnpyler_60297 + protein_RNAP_biocrnpyler_60297 => complex_Sw1_ON_protein_RNAP_biocrnpyler_60297; r3_biocrnpyler_60297_k*complex_Sw1_ON_biocrnpyler_60297*protein_RNAP_biocrnpyler_60297;
    r3_biocrnpyler_60297_k = 38.85714;
  r3_1_biocrnpyler_60297: complex_Sw1_ON_protein_RNAP_biocrnpyler_60297 => complex_Sw1_ON_biocrnpyler_60297 + protein_RNAP_biocrnpyler_60297; r3_1_biocrnpyler_60297_k*complex_Sw1_ON_protein_RNAP_biocrnpyler_60297;
    r3_1_biocrnpyler_60297_k = 10;
  r5_biocrnpyler_60297: complex_Sw1_ON_protein_RNAP_biocrnpyler_60297 => complex_Sw1_ON_biocrnpyler_60297 + rna_I3_biocrnpyler_60297 + protein_RNAP_biocrnpyler_60297; r5_biocrnpyler_60297_k*complex_Sw1_ON_protein_RNAP_biocrnpyler_60297;
    r5_biocrnpyler_60297_k = 0.064;
  r6_biocrnpyler_60297: Sw1_OFF_biocrnpyler_60297 + protein_RNAP_biocrnpyler_60297 => complex_Sw1_OFF_protein_RNAP_biocrnpyler_60297; r6_biocrnpyler_60297_k*Sw1_OFF_biocrnpyler_60297*protein_RNAP_biocrnpyler_60297;
    r6_biocrnpyler_60297_k = 9.530476;
  r6_1_biocrnpyler_60297: complex_Sw1_OFF_protein_RNAP_biocrnpyler_60297 => Sw1_OFF_biocrnpyler_60297 + protein_RNAP_biocrnpyler_60297; r6_1_biocrnpyler_60297_k*complex_Sw1_OFF_protein_RNAP_biocrnpyler_60297;
    r6_1_biocrnpyler_60297_k = 10;
  r8_biocrnpyler_60297: complex_Sw1_OFF_protein_RNAP_biocrnpyler_60297 => Sw1_OFF_biocrnpyler_60297 + rna_I3_biocrnpyler_60297 + protein_RNAP_biocrnpyler_60297; r8_biocrnpyler_60297_k*complex_Sw1_OFF_protein_RNAP_biocrnpyler_60297;
    r8_biocrnpyler_60297_k = 0.007;
  r9_biocrnpyler_60297: complex_Sw1_AI_biocrnpyler_60297 + protein_RNAseH_biocrnpyler_60297 => complex_Sw1_AI_protein_RNAseH_biocrnpyler_60297; r9_biocrnpyler_60297_k*complex_Sw1_AI_biocrnpyler_60297*protein_RNAseH_biocrnpyler_60297;
    r9_biocrnpyler_60297_k = 111.8242;
  r9_1_biocrnpyler_60297: complex_Sw1_AI_protein_RNAseH_biocrnpyler_60297 => complex_Sw1_AI_biocrnpyler_60297 + protein_RNAseH_biocrnpyler_60297; r9_1_biocrnpyler_60297_k*complex_Sw1_AI_protein_RNAseH_biocrnpyler_60297;
    r9_1_biocrnpyler_60297_k = 10;
  r11_biocrnpyler_60297: complex_Sw1_AI_protein_RNAseH_biocrnpyler_60297 => dna_A1_biocrnpyler_60297 + protein_RNAseH_biocrnpyler_60297; r11_biocrnpyler_60297_k*complex_Sw1_AI_protein_RNAseH_biocrnpyler_60297;
    r11_biocrnpyler_60297_k = 0.176;
  r12_biocrnpyler_60297: Sw2_OFF_biocrnpyler_60297 + dna_A2_biocrnpyler_60297 => complex_Sw2_ON_biocrnpyler_60297; r12_biocrnpyler_60297_k*Sw2_OFF_biocrnpyler_60297*dna_A2_biocrnpyler_60297;
    r12_biocrnpyler_60297_k = 0.00394;
  r13_biocrnpyler_60297: complex_Sw2_ON_biocrnpyler_60297 + rna_I2_biocrnpyler_60297 => Sw2_OFF_biocrnpyler_60297 + complex_Sw2_AI_biocrnpyler_60297; r13_biocrnpyler_60297_k*complex_Sw2_ON_biocrnpyler_60297*rna_I2_biocrnpyler_60297;
    r13_biocrnpyler_60297_k = 0.0696;
  r14_biocrnpyler_60297: dna_A2_biocrnpyler_60297 + rna_I2_biocrnpyler_60297 => complex_Sw2_AI_biocrnpyler_60297; r14_biocrnpyler_60297_k*dna_A2_biocrnpyler_60297*rna_I2_biocrnpyler_60297;
    r14_biocrnpyler_60297_k = 0.0696;
  r15_biocrnpyler_60297: complex_Sw2_ON_biocrnpyler_60297 + protein_RNAP_biocrnpyler_60297 => complex_Sw2_ON_protein_RNAP_biocrnpyler_60297; r15_biocrnpyler_60297_k*complex_Sw2_ON_biocrnpyler_60297*protein_RNAP_biocrnpyler_60297;
    r15_biocrnpyler_60297_k = 38.85714;
  r15_1_biocrnpyler_60297: complex_Sw2_ON_protein_RNAP_biocrnpyler_60297 => complex_Sw2_ON_biocrnpyler_60297 + protein_RNAP_biocrnpyler_60297; r15_1_biocrnpyler_60297_k*complex_Sw2_ON_protein_RNAP_biocrnpyler_60297;
    r15_1_biocrnpyler_60297_k = 10;
  r17_biocrnpyler_60297: complex_Sw2_ON_protein_RNAP_biocrnpyler_60297 => complex_Sw2_ON_biocrnpyler_60297 + rna_I3_biocrnpyler_60297 + protein_RNAP_biocrnpyler_60297; r17_biocrnpyler_60297_k*complex_Sw2_ON_protein_RNAP_biocrnpyler_60297;
    r17_biocrnpyler_60297_k = 0.064;
  r18_biocrnpyler_60297: Sw2_OFF_biocrnpyler_60297 + protein_RNAP_biocrnpyler_60297 => complex_Sw2_OFF_protein_RNAP_biocrnpyler_60297; r18_biocrnpyler_60297_k*Sw2_OFF_biocrnpyler_60297*protein_RNAP_biocrnpyler_60297;
    r18_biocrnpyler_60297_k = 9.530476;
  r18_1_biocrnpyler_60297: complex_Sw2_OFF_protein_RNAP_biocrnpyler_60297 => Sw2_OFF_biocrnpyler_60297 + protein_RNAP_biocrnpyler_60297; r18_1_biocrnpyler_60297_k*complex_Sw2_OFF_protein_RNAP_biocrnpyler_60297;
    r18_1_biocrnpyler_60297_k = 10;
  r20_biocrnpyler_60297: complex_Sw2_OFF_protein_RNAP_biocrnpyler_60297 => Sw2_OFF_biocrnpyler_60297 + rna_I3_biocrnpyler_60297 + protein_RNAP_biocrnpyler_60297; r20_biocrnpyler_60297_k*complex_Sw2_OFF_protein_RNAP_biocrnpyler_60297;
    r20_biocrnpyler_60297_k = 0.007;
  r21_biocrnpyler_60297: complex_Sw2_AI_biocrnpyler_60297 + protein_RNAseH_biocrnpyler_60297 => complex_Sw2_AI_protein_RNAseH_biocrnpyler_60297; r21_biocrnpyler_60297_k*complex_Sw2_AI_biocrnpyler_60297*protein_RNAseH_biocrnpyler_60297;
    r21_biocrnpyler_60297_k = 111.8242;
  r21_1_biocrnpyler_60297: complex_Sw2_AI_protein_RNAseH_biocrnpyler_60297 => complex_Sw2_AI_biocrnpyler_60297 + protein_RNAseH_biocrnpyler_60297; r21_1_biocrnpyler_60297_k*complex_Sw2_AI_protein_RNAseH_biocrnpyler_60297;
    r21_1_biocrnpyler_60297_k = 10;
  r23_biocrnpyler_60297: complex_Sw2_AI_protein_RNAseH_biocrnpyler_60297 => dna_A2_biocrnpyler_60297 + protein_RNAseH_biocrnpyler_60297; r23_biocrnpyler_60297_k*complex_Sw2_AI_protein_RNAseH_biocrnpyler_60297;
    r23_biocrnpyler_60297_k = 0.176;
  r24_biocrnpyler_60297: Sw3_OFF_biocrnpyler_60297 + dna_A3_biocrnpyler_60297 => complex_Sw3_ON_biocrnpyler_60297; r24_biocrnpyler_60297_k*Sw3_OFF_biocrnpyler_60297*dna_A3_biocrnpyler_60297;
    r24_biocrnpyler_60297_k = 0.00394;
  r25_biocrnpyler_60297: complex_Sw3_ON_biocrnpyler_60297 + rna_I3_biocrnpyler_60297 => Sw3_OFF_biocrnpyler_60297 + complex_Sw3_AI_biocrnpyler_60297; r25_biocrnpyler_60297_k*complex_Sw3_ON_biocrnpyler_60297*rna_I3_biocrnpyler_60297;
    r25_biocrnpyler_60297_k = 0.0696;
  r26_biocrnpyler_60297: dna_A3_biocrnpyler_60297 + rna_I3_biocrnpyler_60297 => complex_Sw3_AI_biocrnpyler_60297; r26_biocrnpyler_60297_k*dna_A3_biocrnpyler_60297*rna_I3_biocrnpyler_60297;
    r26_biocrnpyler_60297_k = 0.0696;
  r27_biocrnpyler_60297: complex_Sw3_ON_biocrnpyler_60297 + protein_RNAP_biocrnpyler_60297 => complex_Sw3_ON_protein_RNAP_biocrnpyler_60297; r27_biocrnpyler_60297_k*complex_Sw3_ON_biocrnpyler_60297*protein_RNAP_biocrnpyler_60297;
    r27_biocrnpyler_60297_k = 38.85714;
  r27_1_biocrnpyler_60297: complex_Sw3_ON_protein_RNAP_biocrnpyler_60297 => complex_Sw3_ON_biocrnpyler_60297 + protein_RNAP_biocrnpyler_60297; r27_1_biocrnpyler_60297_k*complex_Sw3_ON_protein_RNAP_biocrnpyler_60297;
    r27_1_biocrnpyler_60297_k = 10;
  r29_biocrnpyler_60297: complex_Sw3_ON_protein_RNAP_biocrnpyler_60297 => complex_Sw3_ON_biocrnpyler_60297 + rna_I4_1_1_combined + protein_RNAP_biocrnpyler_60297; r29_biocrnpyler_60297_k*complex_Sw3_ON_protein_RNAP_biocrnpyler_60297;
    r29_biocrnpyler_60297_k = 0.064;
  r30_biocrnpyler_60297: Sw3_OFF_biocrnpyler_60297 + protein_RNAP_biocrnpyler_60297 => complex_Sw3_OFF_protein_RNAP_biocrnpyler_60297; r30_biocrnpyler_60297_k*Sw3_OFF_biocrnpyler_60297*protein_RNAP_biocrnpyler_60297;
    r30_biocrnpyler_60297_k = 9.530476;
  r30_1_biocrnpyler_60297: complex_Sw3_OFF_protein_RNAP_biocrnpyler_60297 => Sw3_OFF_biocrnpyler_60297 + protein_RNAP_biocrnpyler_60297; r30_1_biocrnpyler_60297_k*complex_Sw3_OFF_protein_RNAP_biocrnpyler_60297;
    r30_1_biocrnpyler_60297_k = 10;
  r32_biocrnpyler_60297: complex_Sw3_OFF_protein_RNAP_biocrnpyler_60297 => Sw3_OFF_biocrnpyler_60297 + rna_I4_1_1_combined + protein_RNAP_biocrnpyler_60297; r32_biocrnpyler_60297_k*complex_Sw3_OFF_protein_RNAP_biocrnpyler_60297;
    r32_biocrnpyler_60297_k = 0.007;
  r33_biocrnpyler_60297: complex_Sw3_AI_biocrnpyler_60297 + protein_RNAseH_biocrnpyler_60297 => complex_Sw3_AI_protein_RNAseH_biocrnpyler_60297; r33_biocrnpyler_60297_k*complex_Sw3_AI_biocrnpyler_60297*protein_RNAseH_biocrnpyler_60297;
    r33_biocrnpyler_60297_k = 111.8242;
  r33_1_biocrnpyler_60297: complex_Sw3_AI_protein_RNAseH_biocrnpyler_60297 => complex_Sw3_AI_biocrnpyler_60297 + protein_RNAseH_biocrnpyler_60297; r33_1_biocrnpyler_60297_k*complex_Sw3_AI_protein_RNAseH_biocrnpyler_60297;
    r33_1_biocrnpyler_60297_k = 10;
  r35_biocrnpyler_60297: complex_Sw3_AI_protein_RNAseH_biocrnpyler_60297 => dna_A3_biocrnpyler_60297 + protein_RNAseH_biocrnpyler_60297; r35_biocrnpyler_60297_k*complex_Sw3_AI_protein_RNAseH_biocrnpyler_60297;
    r35_biocrnpyler_60297_k = 0.176;

  // Unit definitions:
  unit square_metre = metre^2;
  unit per_second = 1 / second;
  unit substance = dimensionless;
end
