// SBML level 3 version 2

model complex_membrane()
  // model units - substance: substance, time: second, extent: mole

  // Compartments:
  compartment internal = 1e-6 litre;
  compartment external = 1e-6 litre;

  // Species:
  species rna_I4 in external = 0;
  species rna_I4_1 in internal = 0;
  species transport_protein in internal = 1;
  species rna_I4_transport_protein in internal = 0;

  // Parameters:
  kb = 0.01 per_second;
  kd = 0.2 per_second;

  // Reactions:
  r1: rna_I4 + transport_protein -> rna_I4_transport_protein; kb*rna_I4*transport_protein - kd*rna_I4_transport_protein;
  r2: rna_I4_transport_protein -> rna_I4_1 + transport_protein; kd*rna_I4_transport_protein - kb*rna_I4_1*transport_protein;

  // Unit definitions:
  unit per_second = 1 / second;
  unit substance = dimensionless;
end
